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R1 := 1*10^3
R2 := 1*10^3
25120/25135*100 - 100 = -0.0596777
R3 := 1*10^3
Vpwr := 4.096
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value_of_channel0 := 131070
voltage0 := value_of_channel0*Vpwr/2^18 → 2.04796875
V0 := 2.49998
V1 := 1.97153
Vdiff := V0 - V1
Vdiff → 0.52845
RQ := ((R2*Vpwr - (R1 + R2)*Vdiff)/(R1*Vpwr + (R1 + R2)*Vdiff))*R3 → 589.784393254
LSB := (2.048/2^18 → 0.0000078125) = 7.8125e-6
2.49453/1000 = 0.00249453
969.906*10^3/(1000*10^3)*100 = 96.9906
R1 := 1*10^3
R2 := 1*10^3
R3 := 1*10^3
Vpwr := 4.096
Vdiff := 0.683*(-1)
Rq := (R2*Vpwr - (R1 + R2)*Vdiff)/(R1*Vpwr + (R1 + R2)*Vdiff)*R3 → 2000.73260073
LSB := ((5/2^12) → 5/4096) = 0.0012207
2.49453/1000 = 0.00249453
2^16 = 65536
10922/65536*4.096 = 0.682625
R1 := 100
R2 := 100
R3 := 1*100
Vpwr := 5.0
Vdiff := -2.444552*(-1)
RQ := (R2*Vpwr - (R1 + R2)*Vdiff)/(R1*Vpwr + (R1 + R2)*Vdiff)*R3 → 1.12139583121
LSB := ((5/2^12) → 5/4096) = 0.0012207
2.49453/1000 = 0.00249453
